# Вхідні дані:
m_1 := 2
m_2 := 3
σ_1 := 0.6
σ_2 := 0.7
N := 200
p_1 := 0.7
p_2 := 0.3
# Task 1 - Для заданих (згідно з варіантом) значень параметрів нормальних законів розподілу m1, m2 та σ, які характеризують два класу об'єктів спостереження a1 та a2, визначити умовні щільності ймовірності результатів спостережень x
f(z, m, σ) := 1/(σ*sqrt(2*π))*exp(-(z - m)^2/(2*σ^2))
x1min := m_1 - 3*σ_1 = 0.2
x1max := m_1 + 3*σ_1 = 3.8
x2min := m_2 - 3*σ_2 = 0.9
x2max := m_2 + 3*σ_2 = 5.1
xmin := min(x1min, x2min) = 0.2
xmax := max(x1max, x2max) = 5.1
i := 0 .. N - 1
x[i] := xmin + (xmax - xmin)/(N - 1)*i
x[i] := xmin + (xmax - xmin)/(N - 1)*i = [
    0.2; 0.224623; 0.249246; 0.273869; 0.298492; 0.323116; 0.347739; 0.372362; 0.396985; 0.421608
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]
fx1[i] := f(x[i], m_1, σ_1)
fx2[i] := f(x[i], m_2, σ_2)
# [plot: fx1, fx2 vs x]
# Задача 2
x^2*(σ_2^2 - σ_1^2) + x*(2*m_2*σ_1^2 - 2*m_1*σ_2^2) + m_1^2*σ_2^2 - m_2^2*σ_1^2 - 2*σ_1^2*σ_2^2*ln(σ_2/σ_1) = [
    -1.28918; -1.2829; -1.27646; -1.26986; -1.2631; -1.25619; -1.24912; -1.24189; -1.2345; -1.22695
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]
d_1 := σ_1^2 = 0.36
d_2 := σ_2^2 = 0.49
a := d_2 - d_1 = 0.13
b := 2*(m_2*d_1 - m_1*d_2) = 0.2
c := m_1^2*d_2 - m_2^2*d_1 - 2*d_1*d_2*ln(σ_1/σ_2) = -1.22562
xg_1 := (-b - sqrt(b^2 - 4*a*c))/(2*a) = -3.93459
xg_2 := (-b + sqrt(b^2 - 4*a*c))/(2*a) = 2.39613
xmin := if(xmin > xg_1, xg_1, xmin) = -3.93459
xmax := if(xmax < xg_2, xg_2, xmax) = 5.1
x[i] := xmin + (xmax - xmin)/(N - 1)*i
fg[i] := if(xg_1 < x[i] < xg_2, 0.5, 0)
# [plot: fx1, fx2, fg vs x]
P_21 := integral(f(z, m_2, σ_2), z = xmin .. xg_1) + integral(f(z, m_2, σ_2), z = xg_1 .. xmax) = 0.99865
P_12 := integral(f(z, m_1, σ_1), z = xg_1 .. xg_2) = 0.745444
P := 1 - 0.5*(P_21 + P_12) = 0.127953
fx1[i] := p_1*f(x[i], m_1, σ_1)
fx2[i] := p_2*f(x[i], m_2, σ_2)
# [plot: fx1, fx2 vs x]
Q1[i] := fx1[i]/(fx1[i] + fx2[i])
Q2[i] := fx2[i]/(fx1[i] + fx2[i])
# [plot: Q1, Q2 vs x]
d_1 := σ_1^2 = 0.36
d_2 := σ_2^2 = 0.49
a := d_2 - d_1 = 0.13
b := 2*(m_2*d_1 - m_1*d_2) = 0.2
c := m_1^2*d_2 - m_2^2*d_1 - 2*d_1*d_2*ln(σ_1*p_1/(σ_2*p_2)) = -1.52454
xg_1 := (-b - sqrt(b^2 - 4*a*c))/(2*a) = -4.27907
xg_2 := (-b + sqrt(b^2 - 4*a*c))/(2*a) = 2.74061
xmin := if(xmin > xg_1, xg_1, xmin) = -4.27907
-1.14
xmax := if(xmax < xg_2, xg_2, xmax) = 5.1
7.3
x[i] := xmin + (xmax - xmin)/(N - 1)*i
fx1[i] := f(x[i], m_1, σ_1)
fx2[i] := f(x[i], m_2, σ_2)
fg[i] := if(xg_1 < x[i] < xg_2, 0.5, 0)
# [plot: fx1, fx2, fg vs x]
P_21 := integral(f(z, m_2, σ_2), z = xmin .. xg_1) + integral(f(z, m_2, σ_2), z = xg_1 .. xmax) = 0.99865
P_12 := integral(f(z, m_1, σ_1), z = xg_1 .. xg_2) = 0.891463
P := 1 - (p_2*P_21 + p_1*P_12) = 0.0763809
